Clear

New Circuit.Full_Network bus1=st_mat pu=1.0 basekV=230.0 R1=0.00001 X1=0.00001 R0=0.00001 X0=0.00001

Redirect uhs0_1247/Transformers.dss
Redirect uhs0_1247/uhs0_1247--udt16115/Transformers.dss
Redirect uhs0_1247/uhs0_1247--udt12274/Transformers.dss
Redirect uhs0_1247/uhs0_1247--udt14717/Transformers.dss
Redirect uhs3_1247/uhs3_1247--udt1582/Transformers.dss
Redirect uhs3_1247/Transformers.dss
Redirect uhs3_1247/uhs3_1247--udt1567/Transformers.dss
Redirect uhs3_1247/uhs3_1247--udt1571/Transformers.dss
Redirect uhs11_1247/Transformers.dss
Redirect uhs11_1247/uhs11_1247--udt8110/Transformers.dss
Redirect uhs11_1247/uhs11_1247--p1umv22/Transformers.dss
Redirect uhs11_1247/uhs11_1247--udt7105/Transformers.dss
Redirect uhs16_1247/uhs16_1247--udt310/Transformers.dss
Redirect uhs16_1247/Transformers.dss
Redirect uhs16_1247/uhs16_1247--udt15512/Transformers.dss
Redirect uhs10_1247/uhs10_1247--udt13528/Transformers.dss
Redirect uhs10_1247/Transformers.dss
Redirect uhs10_1247/uhs10_1247--udt12084/Transformers.dss
Redirect uhs10_1247/uhs10_1247--udt11713/Transformers.dss
Redirect uhs5_1247/uhs5_1247--udt159/Transformers.dss
Redirect uhs5_1247/Transformers.dss
Redirect uhs5_1247/uhs5_1247--udt19869/Transformers.dss
Redirect uhs5_1247/uhs5_1247--udt20368/Transformers.dss
Redirect uhs5_1247/uhs5_1247--udt18558/Transformers.dss
Redirect uhs1_1247/Transformers.dss
Redirect uhs1_1247/uhs1_1247--udt20176/Transformers.dss
Redirect uhs1_1247/uhs1_1247--udt15926/Transformers.dss
Redirect uhs2_1247/Transformers.dss
Redirect uhs2_1247/uhs2_1247--udt12473/Transformers.dss
Redirect uhs2_1247/uhs2_1247--udt10746/Transformers.dss
Redirect uhs2_1247/uhs2_1247--udt9312/Transformers.dss
Redirect uhs13_1247/Transformers.dss
Redirect uhs13_1247/uhs13_1247--udt4819/Transformers.dss
Redirect uhs13_1247/uhs13_1247--udt4015/Transformers.dss
Redirect uhs15_1247/Transformers.dss
Redirect uhs15_1247/uhs15_1247--udt19670/Transformers.dss
Redirect uhs15_1247/uhs15_1247--udt20824/Transformers.dss
Redirect uhs7_1247/Transformers.dss
Redirect uhs7_1247/uhs7_1247--udt15849/Transformers.dss
Redirect uhs7_1247/uhs7_1247--udt9662/Transformers.dss
Redirect uhs7_1247/uhs7_1247--udt9675/Transformers.dss
Redirect uhs14_1247/uhs14_1247--udt12226/Transformers.dss
Redirect uhs14_1247/Transformers.dss
Redirect uhs14_1247/uhs14_1247--udt5493/Transformers.dss
Redirect uhs14_1247/uhs14_1247--udt11665/Transformers.dss
Redirect uhs18_1247/uhs18_1247--udt11616/Transformers.dss
Redirect uhs18_1247/Transformers.dss
Redirect uhs18_1247/uhs18_1247--udt13374/Transformers.dss
Redirect uhs18_1247/uhs18_1247--udt17294/Transformers.dss
Redirect uhs9_1247/Transformers.dss
Redirect uhs9_1247/uhs9_1247--udt11456/Transformers.dss
Redirect uhs9_1247/uhs9_1247--udt14110/Transformers.dss
Redirect uhs9_1247/uhs9_1247--udt16813/Transformers.dss
Redirect uhs9_1247/uhs9_1247--udt2508/Transformers.dss
Redirect uhs9_1247/uhs9_1247--udt13714/Transformers.dss
Redirect uhs12_1247/Transformers.dss
Redirect uhs12_1247/uhs12_1247--udt15482/Transformers.dss
Redirect uhs12_1247/uhs12_1247--udt1278/Transformers.dss
Redirect uhs12_1247/uhs12_1247--udt17650/Transformers.dss
Redirect uhs12_1247/uhs12_1247--udt15805/Transformers.dss
Redirect uhs4_1247/Transformers.dss
Redirect uhs4_1247/uhs4_1247--p1umv8/Transformers.dss
Redirect uhs4_1247/uhs4_1247--udt12982/Transformers.dss
Redirect uhs4_1247/uhs4_1247--udt11389/Transformers.dss
Redirect uhs4_1247/uhs4_1247--p1umv7/Transformers.dss
Redirect uhs20_1247/Transformers.dss
Redirect uhs20_1247/uhs20_1247--udt9897/Transformers.dss
Redirect uhs20_1247/uhs20_1247--udt8894/Transformers.dss
Redirect uhs20_1247/uhs20_1247--udt5173/Transformers.dss
Redirect uhs17_1247/Transformers.dss
Redirect uhs17_1247/uhs17_1247--udt6592/Transformers.dss
Redirect uhs17_1247/uhs17_1247--udt9551/Transformers.dss
Redirect uhs6_1247/uhs6_1247--udt10788/Transformers.dss
Redirect uhs6_1247/Transformers.dss
Redirect uhs6_1247/uhs6_1247--udt6570/Transformers.dss
Redirect uhs6_1247/uhs6_1247--udt9964/Transformers.dss
Redirect uhs19_1247/uhs19_1247--udt19872/Transformers.dss
Redirect uhs19_1247/Transformers.dss
Redirect uhs19_1247/uhs19_1247--udt15839/Transformers.dss
Redirect uhs8_1247/Transformers.dss
Redirect uhs8_1247/uhs8_1247--udt7252/Transformers.dss
Redirect uhs8_1247/uhs8_1247--udt12494/Transformers.dss
Redirect subtransmission/Transformers.dss
Redirect uhs0_1247/Regulators.dss
Redirect uhs3_1247/Regulators.dss
Redirect uhs11_1247/Regulators.dss
Redirect uhs16_1247/Regulators.dss
Redirect uhs10_1247/Regulators.dss
Redirect uhs5_1247/Regulators.dss
Redirect uhs1_1247/Regulators.dss
Redirect uhs2_1247/Regulators.dss
Redirect uhs13_1247/Regulators.dss
Redirect uhs15_1247/Regulators.dss
Redirect uhs7_1247/Regulators.dss
Redirect uhs14_1247/Regulators.dss
Redirect uhs18_1247/Regulators.dss
Redirect uhs9_1247/Regulators.dss
Redirect uhs12_1247/Regulators.dss
Redirect uhs4_1247/Regulators.dss
Redirect uhs20_1247/Regulators.dss
Redirect uhs17_1247/Regulators.dss
Redirect uhs6_1247/Regulators.dss
Redirect uhs19_1247/Regulators.dss
Redirect uhs8_1247/Regulators.dss
Redirect uhs0_1247/uhs0_1247--udt16115/Loads.dss
Redirect uhs0_1247/uhs0_1247--udt12274/Loads.dss
Redirect uhs0_1247/uhs0_1247--udt14717/Loads.dss
Redirect uhs3_1247/uhs3_1247--udt1582/Loads.dss
Redirect uhs3_1247/uhs3_1247--udt1567/Loads.dss
Redirect uhs3_1247/uhs3_1247--udt1571/Loads.dss
Redirect uhs11_1247/uhs11_1247--udt8110/Loads.dss
Redirect uhs11_1247/uhs11_1247--p1umv22/Loads.dss
Redirect uhs11_1247/uhs11_1247--udt7105/Loads.dss
Redirect uhs16_1247/uhs16_1247--udt310/Loads.dss
Redirect uhs16_1247/uhs16_1247--udt15512/Loads.dss
Redirect uhs10_1247/uhs10_1247--udt13528/Loads.dss
Redirect uhs10_1247/uhs10_1247--udt12084/Loads.dss
Redirect uhs10_1247/uhs10_1247--udt11713/Loads.dss
Redirect uhs5_1247/uhs5_1247--udt159/Loads.dss
Redirect uhs5_1247/uhs5_1247--udt18558/Loads.dss
Redirect uhs5_1247/uhs5_1247--udt19869/Loads.dss
Redirect uhs5_1247/uhs5_1247--udt20368/Loads.dss
Redirect uhs1_1247/uhs1_1247--udt20176/Loads.dss
Redirect uhs1_1247/uhs1_1247--udt15926/Loads.dss
Redirect uhs2_1247/uhs2_1247--udt12473/Loads.dss
Redirect uhs2_1247/uhs2_1247--udt10746/Loads.dss
Redirect uhs2_1247/uhs2_1247--udt9312/Loads.dss
Redirect uhs13_1247/uhs13_1247--udt4819/Loads.dss
Redirect uhs13_1247/uhs13_1247--udt4015/Loads.dss
Redirect uhs15_1247/uhs15_1247--udt19670/Loads.dss
Redirect uhs15_1247/uhs15_1247--udt20824/Loads.dss
Redirect uhs7_1247/uhs7_1247--udt15849/Loads.dss
Redirect uhs7_1247/uhs7_1247--udt9662/Loads.dss
Redirect uhs7_1247/uhs7_1247--udt9675/Loads.dss
Redirect uhs14_1247/uhs14_1247--udt12226/Loads.dss
Redirect uhs14_1247/uhs14_1247--udt5493/Loads.dss
Redirect uhs14_1247/uhs14_1247--udt11665/Loads.dss
Redirect uhs18_1247/uhs18_1247--udt11616/Loads.dss
Redirect uhs18_1247/uhs18_1247--udt13374/Loads.dss
Redirect uhs18_1247/uhs18_1247--udt17294/Loads.dss
Redirect uhs9_1247/uhs9_1247--udt11456/Loads.dss
Redirect uhs9_1247/uhs9_1247--udt14110/Loads.dss
Redirect uhs9_1247/uhs9_1247--udt16813/Loads.dss
Redirect uhs9_1247/uhs9_1247--udt2508/Loads.dss
Redirect uhs9_1247/uhs9_1247--udt13714/Loads.dss
Redirect uhs12_1247/uhs12_1247--udt15805/Loads.dss
Redirect uhs12_1247/uhs12_1247--udt15482/Loads.dss
Redirect uhs12_1247/uhs12_1247--udt1278/Loads.dss
Redirect uhs12_1247/uhs12_1247--udt17650/Loads.dss
Redirect uhs4_1247/uhs4_1247--udt12982/Loads.dss
Redirect uhs4_1247/uhs4_1247--p1umv8/Loads.dss
Redirect uhs4_1247/uhs4_1247--udt11389/Loads.dss
Redirect uhs4_1247/uhs4_1247--p1umv7/Loads.dss
Redirect uhs20_1247/uhs20_1247--udt9897/Loads.dss
Redirect uhs20_1247/uhs20_1247--udt8894/Loads.dss
Redirect uhs20_1247/uhs20_1247--udt5173/Loads.dss
Redirect uhs17_1247/uhs17_1247--udt6592/Loads.dss
Redirect uhs17_1247/uhs17_1247--udt9551/Loads.dss
Redirect uhs6_1247/uhs6_1247--udt10788/Loads.dss
Redirect uhs6_1247/uhs6_1247--udt6570/Loads.dss
Redirect uhs6_1247/uhs6_1247--udt9964/Loads.dss
Redirect uhs19_1247/uhs19_1247--udt19872/Loads.dss
Redirect uhs19_1247/uhs19_1247--udt15839/Loads.dss
Redirect uhs8_1247/uhs8_1247--udt7252/Loads.dss
Redirect uhs8_1247/uhs8_1247--udt12494/Loads.dss
Redirect uhs0_1247/LineCodes.dss
Redirect uhs0_1247/uhs0_1247--udt16115/LineCodes.dss
Redirect uhs0_1247/uhs0_1247--udt12274/LineCodes.dss
Redirect uhs0_1247/uhs0_1247--udt14717/LineCodes.dss
Redirect uhs3_1247/uhs3_1247--udt1582/LineCodes.dss
Redirect uhs3_1247/LineCodes.dss
Redirect uhs3_1247/uhs3_1247--udt1567/LineCodes.dss
Redirect uhs3_1247/uhs3_1247--udt1571/LineCodes.dss
Redirect uhs11_1247/LineCodes.dss
Redirect uhs11_1247/uhs11_1247--udt8110/LineCodes.dss
Redirect uhs11_1247/uhs11_1247--p1umv22/LineCodes.dss
Redirect uhs11_1247/uhs11_1247--udt7105/LineCodes.dss
Redirect uhs16_1247/uhs16_1247--udt310/LineCodes.dss
Redirect uhs16_1247/LineCodes.dss
Redirect uhs16_1247/uhs16_1247--udt15512/LineCodes.dss
Redirect uhs10_1247/uhs10_1247--udt13528/LineCodes.dss
Redirect uhs10_1247/LineCodes.dss
Redirect uhs10_1247/uhs10_1247--udt12084/LineCodes.dss
Redirect uhs10_1247/uhs10_1247--udt11713/LineCodes.dss
Redirect uhs5_1247/uhs5_1247--udt159/LineCodes.dss
Redirect uhs5_1247/LineCodes.dss
Redirect uhs5_1247/uhs5_1247--udt19869/LineCodes.dss
Redirect uhs5_1247/uhs5_1247--udt20368/LineCodes.dss
Redirect uhs5_1247/uhs5_1247--udt18558/LineCodes.dss
Redirect uhs1_1247/LineCodes.dss
Redirect uhs1_1247/uhs1_1247--udt20176/LineCodes.dss
Redirect uhs1_1247/uhs1_1247--udt15926/LineCodes.dss
Redirect uhs2_1247/LineCodes.dss
Redirect uhs2_1247/uhs2_1247--udt12473/LineCodes.dss
Redirect uhs2_1247/uhs2_1247--udt10746/LineCodes.dss
Redirect uhs2_1247/uhs2_1247--udt9312/LineCodes.dss
Redirect uhs13_1247/LineCodes.dss
Redirect uhs13_1247/uhs13_1247--udt4819/LineCodes.dss
Redirect uhs13_1247/uhs13_1247--udt4015/LineCodes.dss
Redirect uhs15_1247/LineCodes.dss
Redirect uhs15_1247/uhs15_1247--udt19670/LineCodes.dss
Redirect uhs15_1247/uhs15_1247--udt20824/LineCodes.dss
Redirect uhs7_1247/LineCodes.dss
Redirect uhs7_1247/uhs7_1247--udt15849/LineCodes.dss
Redirect uhs7_1247/uhs7_1247--udt9662/LineCodes.dss
Redirect uhs7_1247/uhs7_1247--udt9675/LineCodes.dss
Redirect uhs14_1247/uhs14_1247--udt12226/LineCodes.dss
Redirect uhs14_1247/LineCodes.dss
Redirect uhs14_1247/uhs14_1247--udt5493/LineCodes.dss
Redirect uhs14_1247/uhs14_1247--udt11665/LineCodes.dss
Redirect uhs18_1247/uhs18_1247--udt11616/LineCodes.dss
Redirect uhs18_1247/LineCodes.dss
Redirect uhs18_1247/uhs18_1247--udt13374/LineCodes.dss
Redirect uhs18_1247/uhs18_1247--udt17294/LineCodes.dss
Redirect uhs9_1247/LineCodes.dss
Redirect uhs9_1247/uhs9_1247--udt11456/LineCodes.dss
Redirect uhs9_1247/uhs9_1247--udt14110/LineCodes.dss
Redirect uhs9_1247/uhs9_1247--udt16813/LineCodes.dss
Redirect uhs9_1247/uhs9_1247--udt2508/LineCodes.dss
Redirect uhs9_1247/uhs9_1247--udt13714/LineCodes.dss
Redirect uhs12_1247/LineCodes.dss
Redirect uhs12_1247/uhs12_1247--udt15482/LineCodes.dss
Redirect uhs12_1247/uhs12_1247--udt1278/LineCodes.dss
Redirect uhs12_1247/uhs12_1247--udt17650/LineCodes.dss
Redirect uhs12_1247/uhs12_1247--udt15805/LineCodes.dss
Redirect uhs4_1247/LineCodes.dss
Redirect uhs4_1247/uhs4_1247--p1umv8/LineCodes.dss
Redirect uhs4_1247/uhs4_1247--udt12982/LineCodes.dss
Redirect uhs4_1247/uhs4_1247--udt11389/LineCodes.dss
Redirect uhs4_1247/uhs4_1247--p1umv7/LineCodes.dss
Redirect uhs20_1247/LineCodes.dss
Redirect uhs20_1247/uhs20_1247--udt9897/LineCodes.dss
Redirect uhs20_1247/uhs20_1247--udt8894/LineCodes.dss
Redirect uhs20_1247/uhs20_1247--udt5173/LineCodes.dss
Redirect uhs17_1247/LineCodes.dss
Redirect uhs17_1247/uhs17_1247--udt6592/LineCodes.dss
Redirect uhs17_1247/uhs17_1247--udt9551/LineCodes.dss
Redirect uhs6_1247/uhs6_1247--udt10788/LineCodes.dss
Redirect uhs6_1247/LineCodes.dss
Redirect uhs6_1247/uhs6_1247--udt6570/LineCodes.dss
Redirect uhs6_1247/uhs6_1247--udt9964/LineCodes.dss
Redirect uhs19_1247/uhs19_1247--udt19872/LineCodes.dss
Redirect uhs19_1247/LineCodes.dss
Redirect uhs19_1247/uhs19_1247--udt15839/LineCodes.dss
Redirect uhs8_1247/LineCodes.dss
Redirect uhs8_1247/uhs8_1247--udt7252/LineCodes.dss
Redirect uhs8_1247/uhs8_1247--udt12494/LineCodes.dss
Redirect subtransmission/LineCodes.dss
Redirect uhs0_1247/Lines.dss
Redirect uhs0_1247/uhs0_1247--udt16115/Lines.dss
Redirect uhs0_1247/uhs0_1247--udt12274/Lines.dss
Redirect uhs0_1247/uhs0_1247--udt14717/Lines.dss
Redirect uhs3_1247/uhs3_1247--udt1582/Lines.dss
Redirect uhs3_1247/Lines.dss
Redirect uhs3_1247/uhs3_1247--udt1567/Lines.dss
Redirect uhs3_1247/uhs3_1247--udt1571/Lines.dss
Redirect uhs11_1247/Lines.dss
Redirect uhs11_1247/uhs11_1247--udt8110/Lines.dss
Redirect uhs11_1247/uhs11_1247--p1umv22/Lines.dss
Redirect uhs11_1247/uhs11_1247--udt7105/Lines.dss
Redirect uhs16_1247/uhs16_1247--udt310/Lines.dss
Redirect uhs16_1247/Lines.dss
Redirect uhs16_1247/uhs16_1247--udt15512/Lines.dss
Redirect uhs10_1247/uhs10_1247--udt13528/Lines.dss
Redirect uhs10_1247/Lines.dss
Redirect uhs10_1247/uhs10_1247--udt12084/Lines.dss
Redirect uhs10_1247/uhs10_1247--udt11713/Lines.dss
Redirect uhs5_1247/uhs5_1247--udt159/Lines.dss
Redirect uhs5_1247/Lines.dss
Redirect uhs5_1247/uhs5_1247--udt19869/Lines.dss
Redirect uhs5_1247/uhs5_1247--udt20368/Lines.dss
Redirect uhs5_1247/uhs5_1247--udt18558/Lines.dss
Redirect uhs1_1247/Lines.dss
Redirect uhs1_1247/uhs1_1247--udt20176/Lines.dss
Redirect uhs1_1247/uhs1_1247--udt15926/Lines.dss
Redirect uhs2_1247/Lines.dss
Redirect uhs2_1247/uhs2_1247--udt12473/Lines.dss
Redirect uhs2_1247/uhs2_1247--udt10746/Lines.dss
Redirect uhs2_1247/uhs2_1247--udt9312/Lines.dss
Redirect uhs13_1247/Lines.dss
Redirect uhs13_1247/uhs13_1247--udt4819/Lines.dss
Redirect uhs13_1247/uhs13_1247--udt4015/Lines.dss
Redirect uhs15_1247/Lines.dss
Redirect uhs15_1247/uhs15_1247--udt19670/Lines.dss
Redirect uhs15_1247/uhs15_1247--udt20824/Lines.dss
Redirect uhs7_1247/Lines.dss
Redirect uhs7_1247/uhs7_1247--udt15849/Lines.dss
Redirect uhs7_1247/uhs7_1247--udt9662/Lines.dss
Redirect uhs7_1247/uhs7_1247--udt9675/Lines.dss
Redirect uhs14_1247/uhs14_1247--udt12226/Lines.dss
Redirect uhs14_1247/Lines.dss
Redirect uhs14_1247/uhs14_1247--udt5493/Lines.dss
Redirect uhs14_1247/uhs14_1247--udt11665/Lines.dss
Redirect uhs18_1247/uhs18_1247--udt11616/Lines.dss
Redirect uhs18_1247/Lines.dss
Redirect uhs18_1247/uhs18_1247--udt13374/Lines.dss
Redirect uhs18_1247/uhs18_1247--udt17294/Lines.dss
Redirect uhs9_1247/Lines.dss
Redirect uhs9_1247/uhs9_1247--udt11456/Lines.dss
Redirect uhs9_1247/uhs9_1247--udt14110/Lines.dss
Redirect uhs9_1247/uhs9_1247--udt16813/Lines.dss
Redirect uhs9_1247/uhs9_1247--udt2508/Lines.dss
Redirect uhs9_1247/uhs9_1247--udt13714/Lines.dss
Redirect uhs12_1247/Lines.dss
Redirect uhs12_1247/uhs12_1247--udt15482/Lines.dss
Redirect uhs12_1247/uhs12_1247--udt1278/Lines.dss
Redirect uhs12_1247/uhs12_1247--udt17650/Lines.dss
Redirect uhs12_1247/uhs12_1247--udt15805/Lines.dss
Redirect uhs4_1247/Lines.dss
Redirect uhs4_1247/uhs4_1247--p1umv8/Lines.dss
Redirect uhs4_1247/uhs4_1247--udt12982/Lines.dss
Redirect uhs4_1247/uhs4_1247--udt11389/Lines.dss
Redirect uhs4_1247/uhs4_1247--p1umv7/Lines.dss
Redirect uhs20_1247/Lines.dss
Redirect uhs20_1247/uhs20_1247--udt9897/Lines.dss
Redirect uhs20_1247/uhs20_1247--udt8894/Lines.dss
Redirect uhs20_1247/uhs20_1247--udt5173/Lines.dss
Redirect uhs17_1247/Lines.dss
Redirect uhs17_1247/uhs17_1247--udt6592/Lines.dss
Redirect uhs17_1247/uhs17_1247--udt9551/Lines.dss
Redirect uhs6_1247/uhs6_1247--udt10788/Lines.dss
Redirect uhs6_1247/Lines.dss
Redirect uhs6_1247/uhs6_1247--udt6570/Lines.dss
Redirect uhs6_1247/uhs6_1247--udt9964/Lines.dss
Redirect uhs19_1247/uhs19_1247--udt19872/Lines.dss
Redirect uhs19_1247/Lines.dss
Redirect uhs19_1247/uhs19_1247--udt15839/Lines.dss
Redirect uhs8_1247/Lines.dss
Redirect uhs8_1247/uhs8_1247--udt7252/Lines.dss
Redirect uhs8_1247/uhs8_1247--udt12494/Lines.dss
Redirect subtransmission/Lines.dss
Redirect uhs0_1247/uhs0_1247--udt12274/Capacitors.dss
Redirect uhs0_1247/uhs0_1247--udt14717/Capacitors.dss
Redirect uhs1_1247/uhs1_1247--udt20176/Capacitors.dss
Redirect uhs1_1247/uhs1_1247--udt15926/Capacitors.dss
Redirect uhs2_1247/uhs2_1247--udt12473/Capacitors.dss
Redirect uhs2_1247/uhs2_1247--udt9312/Capacitors.dss
Redirect uhs3_1247/uhs3_1247--udt1582/Capacitors.dss
Redirect uhs3_1247/uhs3_1247--udt1567/Capacitors.dss
Redirect uhs4_1247/uhs4_1247--udt12982/Capacitors.dss
Redirect uhs4_1247/uhs4_1247--p1umv8/Capacitors.dss
Redirect uhs4_1247/uhs4_1247--udt11389/Capacitors.dss
Redirect uhs4_1247/uhs4_1247--p1umv7/Capacitors.dss
Redirect uhs5_1247/uhs5_1247--udt18558/Capacitors.dss
Redirect uhs5_1247/uhs5_1247--udt19869/Capacitors.dss
Redirect uhs5_1247/uhs5_1247--udt20368/Capacitors.dss
Redirect uhs6_1247/uhs6_1247--udt10788/Capacitors.dss
Redirect uhs6_1247/uhs6_1247--udt9964/Capacitors.dss
Redirect uhs6_1247/uhs6_1247--udt6570/Capacitors.dss
Redirect uhs7_1247/uhs7_1247--udt15849/Capacitors.dss
Redirect uhs7_1247/uhs7_1247--udt9662/Capacitors.dss
Redirect uhs7_1247/uhs7_1247--udt9675/Capacitors.dss
Redirect uhs8_1247/uhs8_1247--udt7252/Capacitors.dss
Redirect uhs8_1247/uhs8_1247--udt12494/Capacitors.dss
Redirect uhs9_1247/uhs9_1247--udt14110/Capacitors.dss
Redirect uhs9_1247/uhs9_1247--udt16813/Capacitors.dss
Redirect uhs9_1247/uhs9_1247--udt2508/Capacitors.dss
Redirect uhs9_1247/uhs9_1247--udt13714/Capacitors.dss
Redirect uhs10_1247/uhs10_1247--udt13528/Capacitors.dss
Redirect uhs10_1247/uhs10_1247--udt12084/Capacitors.dss
Redirect uhs10_1247/uhs10_1247--udt11713/Capacitors.dss
Redirect uhs11_1247/uhs11_1247--udt8110/Capacitors.dss
Redirect uhs11_1247/uhs11_1247--udt7105/Capacitors.dss
Redirect uhs12_1247/uhs12_1247--udt15482/Capacitors.dss
Redirect uhs12_1247/uhs12_1247--udt1278/Capacitors.dss
Redirect uhs12_1247/uhs12_1247--udt15805/Capacitors.dss
Redirect uhs12_1247/uhs12_1247--udt17650/Capacitors.dss
Redirect uhs13_1247/uhs13_1247--udt4819/Capacitors.dss
Redirect uhs13_1247/uhs13_1247--udt4015/Capacitors.dss
Redirect uhs14_1247/uhs14_1247--udt5493/Capacitors.dss
Redirect uhs14_1247/uhs14_1247--udt11665/Capacitors.dss
Redirect uhs15_1247/uhs15_1247--udt19670/Capacitors.dss
Redirect uhs15_1247/uhs15_1247--udt20824/Capacitors.dss
Redirect uhs16_1247/uhs16_1247--udt310/Capacitors.dss
Redirect uhs16_1247/uhs16_1247--udt15512/Capacitors.dss
Redirect uhs17_1247/uhs17_1247--udt6592/Capacitors.dss
Redirect uhs17_1247/uhs17_1247--udt9551/Capacitors.dss
Redirect uhs18_1247/uhs18_1247--udt11616/Capacitors.dss
Redirect uhs18_1247/uhs18_1247--udt13374/Capacitors.dss
Redirect uhs18_1247/uhs18_1247--udt17294/Capacitors.dss
Redirect uhs19_1247/uhs19_1247--udt19872/Capacitors.dss
Redirect uhs20_1247/uhs20_1247--udt9897/Capacitors.dss
Redirect uhs20_1247/uhs20_1247--udt5173/Capacitors.dss
Redirect uhs20_1247/uhs20_1247--udt8894/Capacitors.dss

Set Voltagebases=[0.2080002494301389, 0.48, 7.199560000000001, 12.47, 69.0, 230.0]

Calcvoltagebases

Buscoords Buscoords.dss

Solve
