New Capacitor.uc51 Bus1=p1umv73 phases=3 Kv=12.47 conn=Wye Kvar=600.0

New CapControl.uc51 Capacitor=uc51 Element=Line.l(r:p1umv73-udt17791) Terminal=1 delay=100.0 Type=voltage Vmin=120.5 Vmax=125.0 Ptratio=59.99631547328862 Ctratio=100.0

New Capacitor.uc55 Bus1=udt1661 phases=3 Kv=12.47 conn=Wye Kvar=450.0

New CapControl.uc55 Capacitor=uc55 Element=Line.l(r:udt12204-udt1661) Terminal=1 delay=100.0 Type=voltage Vmin=120.5 Vmax=125.0 Ptratio=59.99631547328862 Ctratio=100.0
