New Capacitor.uc53 Bus1=udt13398 phases=3 Kv=12.47 conn=Wye Kvar=600.0

New CapControl.uc53 Capacitor=uc53 Element=Line.padswitch(r:udt13398-udt6933)u_73691 Terminal=1 delay=100.0 Type=voltage Vmin=120.5 Vmax=125.0 Ptratio=59.99631547328862 Ctratio=100.0
