New Capacitor.uc52 Bus1=udt4316 phases=3 Kv=12.47 conn=Wye Kvar=600.0

New CapControl.uc52 Capacitor=uc52 Element=Line.l(r:udt11005-udt4316) Terminal=1 delay=100.0 Type=voltage Vmin=120.5 Vmax=125.0 Ptratio=59.99631547328862 Ctratio=100.0

New Capacitor.uc54 Bus1=p1umv14 phases=3 Kv=12.47 conn=Wye Kvar=450.0

New CapControl.uc54 Capacitor=uc54 Element=Line.padswitch(r:p1umv14-udt4312)u_74096 Terminal=1 delay=100.0 Type=voltage Vmin=120.5 Vmax=125.0 Ptratio=59.99631547328862 Ctratio=100.0
