New Capacitor.uc67 Bus1=p1umv44 phases=3 Kv=12.47 conn=Wye Kvar=450.0

New CapControl.uc67 Capacitor=uc67 Element=Line.l(r:p1umv44-p1umv71) Terminal=1 delay=100.0 Type=voltage Vmin=120.5 Vmax=125.0 Ptratio=59.99631547328862 Ctratio=100.0
