New Capacitor.uc78 Bus1=udt17950 phases=3 Kv=12.47 conn=Wye Kvar=600.0

New CapControl.uc78 Capacitor=uc78 Element=Line.l(r:udt17950-udt20464) Terminal=1 delay=100.0 Type=voltage Vmin=120.5 Vmax=125.0 Ptratio=59.99631547328862 Ctratio=100.0

New Capacitor.uc79 Bus1=udt3661 phases=3 Kv=12.47 conn=Wye Kvar=600.0

New CapControl.uc79 Capacitor=uc79 Element=Line.l(r:udt20139-udt3661) Terminal=1 delay=100.0 Type=voltage Vmin=120.5 Vmax=125.0 Ptratio=59.99631547328862 Ctratio=100.0
