New Capacitor.uc80 Bus1=p1umv96 phases=3 Kv=12.47 conn=Wye Kvar=600.0

New CapControl.uc80 Capacitor=uc80 Element=Line.l(r:p1umv96-udt19832) Terminal=1 delay=100.0 Type=voltage Vmin=120.5 Vmax=125.0 Ptratio=59.99631547328862 Ctratio=100.0
