New Capacitor.uc84 Bus1=p1umv13 phases=3 Kv=12.47 conn=Wye Kvar=600.0

New CapControl.uc84 Capacitor=uc84 Element=Line.l(r:p1umv13-udt7803) Terminal=1 delay=100.0 Type=voltage Vmin=120.5 Vmax=125.0 Ptratio=59.99631547328862 Ctratio=100.0

New Capacitor.uc86 Bus1=udt20333 phases=3 Kv=12.47 conn=Wye Kvar=450.0

New CapControl.uc86 Capacitor=uc86 Element=Line.padswitch(r:udt20333-udt2885)u_81659 Terminal=1 delay=100.0 Type=voltage Vmin=120.5 Vmax=125.0 Ptratio=59.99631547328862 Ctratio=100.0
