New Capacitor.uc5 Bus1=p1umv89 phases=3 Kv=12.47 conn=Wye Kvar=450.0

New CapControl.uc5 Capacitor=uc5 Element=Line.l(r:p1umv89-udt2349) Terminal=1 delay=100.0 Type=voltage Vmin=120.5 Vmax=125.0 Ptratio=59.99631547328862 Ctratio=100.0
