New Capacitor.uc14 Bus1=p1umv29 phases=3 Kv=12.47 conn=Wye Kvar=600.0

New CapControl.uc14 Capacitor=uc14 Element=Line.l(r:p1umv29-udt17380) Terminal=1 delay=100.0 Type=voltage Vmin=120.5 Vmax=125.0 Ptratio=59.99631547328862 Ctratio=100.0

New Capacitor.uc15 Bus1=p1umv26 phases=3 Kv=12.47 conn=Wye Kvar=450.0

New CapControl.uc15 Capacitor=uc15 Element=Line.l(r:p1umv26-udt14286) Terminal=1 delay=100.0 Type=voltage Vmin=120.5 Vmax=125.0 Ptratio=59.99631547328862 Ctratio=100.0
