New Capacitor.uc25 Bus1=p1umv36 phases=3 Kv=12.47 conn=Wye Kvar=450.0

New CapControl.uc25 Capacitor=uc25 Element=Line.padswitch(r:p1umv36-udt17595)u_68740 Terminal=1 delay=100.0 Type=voltage Vmin=120.5 Vmax=125.0 Ptratio=59.99631547328862 Ctratio=100.0
