New Capacitor.uc36 Bus1=p1umv57 phases=3 Kv=12.47 conn=Wye Kvar=450.0

New CapControl.uc36 Capacitor=uc36 Element=Line.l(r:p1umv57-udt12223) Terminal=1 delay=100.0 Type=voltage Vmin=120.5 Vmax=125.0 Ptratio=59.99631547328862 Ctratio=100.0

New Capacitor.uc39 Bus1=udt9627 phases=3 Kv=12.47 conn=Wye Kvar=450.0

New CapControl.uc39 Capacitor=uc39 Element=Line.padswitch(r:udt14788-udt9627)u_70613 Terminal=1 delay=100.0 Type=voltage Vmin=120.5 Vmax=125.0 Ptratio=59.99631547328862 Ctratio=100.0
