New Capacitor.uc49 Bus1=p1umv65 phases=3 Kv=12.47 conn=Wye Kvar=300.0

New CapControl.uc49 Capacitor=uc49 Element=Line.l(r:p1umv65-udt10598) Terminal=1 delay=100.0 Type=voltage Vmin=120.5 Vmax=125.0 Ptratio=59.99631547328862 Ctratio=100.0
